*Heading
** Job name: Cylinder Model name: Model-1
** Generated by: Abaqus/CAE 2017
*Preprint, echo=NO, model=NO, history=NO, contact=NO
**
** PARTS
**
*Part, name=Part-1
*Node
      1,   18.6183834,  -10.1664066,           0.
      2,   21.1591549,   1.51333261,           0.
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*Element, type=C3D8
   1,   85,   92,   94,   93,   15,   22,   24,   23
   2,   84,  112,   94,   92,   14,   42,   24,   22
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*Nset, nset=Top_Surface, generate
  1,  70,   1
** Section: Section-1
*End Part
**
**
** ASSEMBLY
**
*Assembly, name=Assembly
**
*Instance, name=Part-1-1, part=Part-1
*End Instance
**
*End Assembly
**
** MATERIALS
**
*Material, name=Material-1
*Elastic
100000., 0.35
