*Heading
** Job name: Job-1 Model name: Model-1
** Generated by: Abaqus/CAE 2017
*Preprint, echo=NO, model=NO, history=NO, contact=NO
**
** PARTS
**
*Part, name=Part-1
*Node
      1,          10.,           0.,          48.
      2,          10.,           0.,         100.
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*Element, type=C3D8R
  1,   5,  48, 213,  73,   1,  22, 201,  47
  2,  48,  49, 214, 213,  22,  23, 202, 201
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*Nset, nset=Set-1, generate
   1,  364,    1
*Elset, elset=Set-1, generate
   1,  200,    1
** Section: Section-1
*Solid Section, elset=Set-1, material=MATERIAL_1
,
*End Part
**
**
** ASSEMBLY
**
*Assembly, name=Assembly
**
*Instance, name=Part-1-1, part=Part-1
*End Instance
**
*Nset, nset=NSET1, instance=Part-1-1
  20, 176, 177, 178, 179, 180
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*Nset, nset=NSET2, instance=Part-1-1
  10,  12,  75,  76,  77,  78
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*Nset, nset=NSET3, instance=Part-1-1
   1,   5,  22,  23,  24,  25
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*Nset, nset=NSET4, instance=Part-1-1
 21,
*Nset, nset=NSET5, instance=Part-1-1
  13,  15, 200
*Nset, nset=NSET6, instance=Part-1-1
  17, 18, 188
*Nset, nset=NSET7, instance=Part-1-1
  14,  16, 113, 136, 148, 160, 341
*Nset, nset=NSET8, instance=Part-1-1
 19,
*Nset, nset=NSET9, instance=Part-1-1
   9,  11, 173
*Nset, nset=NSET10, instance=Part-1-1
   2,   6, 172
*Nset, nset=NSET11, instance=Part-1-1
   3,   7,  34,  60,  74,  88, 293
*End Assembly
**
** MATERIALS
**
*Material, name=MATERIAL_1
*Density
1000.,
*Elastic
100., 0.45
** ----------------------------------------------------------------
**
** STEP: Step-1
**
*Step, name=Step-1, nlgeom=NO
*Static
1., 1., 1e-05, 1.
**
** BOUNDARY CONDITIONS
**
** Name: BC-1 Type: Displacement/Rotation
*Boundary
NSET1, 1, 1
NSET1, 2, 2
NSET1, 4, 4
NSET1, 5, 5
NSET1, 6, 6
** Name: BC-2 Type: Displacement/Rotation
*Boundary
NSET2, 1, 1
NSET2, 4, 4
NSET2, 5, 5
NSET2, 6, 6
** Name: BC-3 Type: Displacement/Rotation
*Boundary
NSET3, 2, 2
NSET3, 4, 4
NSET3, 5, 5
NSET3, 6, 6
** Name: BC-4 Type: Displacement/Rotation
*Boundary
NSET4, 1, 1
NSET4, 2, 2
NSET4, 3, 3
NSET4, 4, 4
NSET4, 5, 5
NSET4, 6, 6
** Name: BC-5 Type: Displacement/Rotation
*Boundary
NSET5, 1, 1
NSET5, 3, 3
NSET5, 4, 4
NSET5, 5, 5
NSET5, 6, 6
** Name: BC-6 Type: Displacement/Rotation
*Boundary
NSET6, 2, 2
NSET6, 3, 3
NSET6, 4, 4
NSET6, 5, 5
NSET6, 6, 6
** Name: BC-7 Type: Displacement/Rotation
*Boundary
NSET7, 3, 3
NSET7, 4, 4
NSET7, 5, 5
NSET7, 6, 6
** Name: BC-8 Type: Displacement/Rotation
*Boundary
NSET8, 1, 1
NSET8, 2, 2
NSET8, 3, 3, 5.
NSET8, 4, 4
NSET8, 5, 5
NSET8, 6, 6
** Name: BC-9 Type: Displacement/Rotation
*Boundary
NSET9, 1, 1
NSET9, 3, 3, 5.
NSET9, 4, 4
NSET9, 5, 5
NSET9, 6, 6
** Name: BC-10 Type: Displacement/Rotation
*Boundary
NSET10, 2, 2
NSET10, 3, 3, 5.
NSET10, 4, 4
NSET10, 5, 5
NSET10, 6, 6
** Name: BC-11 Type: Displacement/Rotation
*Boundary
NSET11, 3, 3, 5.
NSET11, 4, 4
NSET11, 5, 5
NSET11, 6, 6
**
** OUTPUT REQUESTS
**
*Restart, write, frequency=0
**
** FIELD OUTPUT: F-Output-1
**
*Output, field, variable=PRESELECT
**
** HISTORY OUTPUT: H-Output-1
**
*Output, history, variable=PRESELECT
*End Step
